2023/07/07 周五
06:02
;; 1. Based on: run38
;; 2. Description: Final model QC FIX_add
;; x1. Author: DUXACT
;; 3. Label:
$PROBLEM
$INPUT      C ID CYCLE DAY=DROP TIME NTIME=DROP DV AMT RATE DUR CMT
            DOSE MDV EVID BQL TYPE STUDY SEX WT AGE
$DATA      NM_dat_new.csv IGNORE=C
$SUBROUTINE ADVAN3 TRANS4
$PK
;;; V1WT-DEFINITION START
   V1WT = ((WT/62.14)**THETA(7))
;;; V1WT-DEFINITION END

;;; V1-RELATION START
V1COV=V1WT
;;; V1-RELATION END

D1=DUR
TVCL = THETA(1)
CL = TVCL * EXP(ETA(1))
TVV1 = THETA(2)

TVV1 = V1COV*TVV1
V1 = TVV1 * EXP(ETA(2))
TVQ = THETA(3)
Q  = TVQ * EXP(ETA(3))
TVV2 = THETA(4)
V2 = TVV2 * EXP(ETA(4))
S1 = V1/1000

$ERROR
IPRED = F
    W = SQRT(THETA(5)**2*IPRED**2 + THETA(6)**2)
    Y = IPRED + W*EPS(1)
 IRES = DV-IPRED
IWRES = IRES/W

$THETA  (0,0.0122) ; CL_L/h
 (0,4.36) ; V1_L
 (0,0.0207) ; Q_L/h
 (0,2) ; V2_L
 (0,0.141) ; Prop.RE (sd)
 0 FIX ; Add.RE (sd)
 (0,0.73) ; V1WT1
$OMEGA  0.222  ;     IIV CL
 0.0521  ;     IIV V1
 0  FIX  ;      IIV Q
 0  FIX  ;     IIV V2
$SIGMA  1  FIX  ; Proportional error PK
$ESTIMATION METHOD=1 INTER MAXEVAL=9999 NOABORT SIG=3 PRINT=10
; Xpose
$COVARIANCE
$TABLE      ID TIME DV MDV PRED IPRED CWRES CIWRES STUDY ONEHEADER
            NOPRINT NOAPPEND FILE=SDTAB41 FORMAT=s1PE14.7
$TABLE      ID CL V1 Q V2 ETA1 ETA2 ETA3 ETA4 NOPRINT NOAPPEND
            ONEHEADER FILE=PATAB41
$TABLE      ID ETA1 ETA2 ETA3 ETA4 FIRSTONLY NOAPPEND NOPRINT
            FILE=00041.ETA
$TABLE      ID WT SEX STUDY NOPRINT NOAPPEND ONEHEADER FILE=CATAB41
$TABLE      ID AGE NOPRINT NOAPPEND ONEHEADER FILE=COTAB41

NM-TRAN MESSAGES
 WARNINGS AND ERRORS (IF ANY) FOR PROBLEM    1
 (WARNING  2) NM-TRAN INFERS THAT THE DATA ARE POPULATION.

1NONLINEAR MIXED EFFECTS MODEL PROGRAM (NONMEM) VERSION 7.5.0
 ORIGINALLY DEVELOPED BY STUART BEAL, LEWIS SHEINER, AND ALISON BOECKMANN
 CURRENT DEVELOPERS ARE ROBERT BAUER, ICON DEVELOPMENT SOLUTIONS,
 AND ALISON BOECKMANN. IMPLEMENTATION, EFFICIENCY, AND STANDARDIZATION
 PERFORMED BY NOUS INFOSYSTEMS.
 PROBLEM NO.:         1

 TOT. NO. OF OBS RECS:      397
 TOT. NO. OF INDIVIDUALS:       40
 TWO COMPARTMENT MODEL (ADVAN3)
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 #TBLN:      1
 #METH: First Order Conditional Estimation with Interaction
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
 #TERM:
0MINIMIZATION SUCCESSFUL
 HOWEVER, PROBLEMS OCCURRED WITH THE MINIMIZATION.
 REGARD THE RESULTS OF THE ESTIMATION STEP CAREFULLY, AND ACCEPT THEM ONLY
 AFTER CHECKING THAT THE COVARIANCE STEP PRODUCES REASONABLE OUTPUT.
 NO. OF FUNCTION EVALUATIONS USED:      258
 NO. OF SIG. DIGITS IN FINAL EST.:  3.6

 ETABAR IS THE ARITHMETIC MEAN OF THE ETA-ESTIMATES,
 AND THE P-VALUE IS GIVEN FOR THE NULL HYPOTHESIS THAT THE TRUE MEAN IS 0.

 ETABAR:         5.9823E-03 -3.6377E-03  0.0000E+00  0.0000E+00
 SE:             7.0263E-02  2.5015E-02  0.0000E+00  0.0000E+00
 N:                      40          40          40          40

 P VAL.:         9.3215E-01  8.8438E-01  1.0000E+00  1.0000E+00

 ETASHRINKSD(%)  2.6973E+00  9.1576E+00  0.0000E+00  0.0000E+00
 ETASHRINKVR(%)  5.3218E+00  1.7477E+01  0.0000E+00  0.0000E+00
 EBVSHRINKSD(%)  3.4130E+00  1.0232E+01  0.0000E+00  0.0000E+00
 EBVSHRINKVR(%)  6.7096E+00  1.9417E+01  0.0000E+00  0.0000E+00
 RELATIVEINF(%)  9.3263E+01  8.0559E+01  0.0000E+00  0.0000E+00
 EPSSHRINKSD(%)  8.6828E+00
 EPSSHRINKVR(%)  1.6612E+01


 TOTAL DATA POINTS NORMALLY DISTRIBUTED (N):          397
 N*LOG(2PI) CONSTANT TO OBJECTIVE FUNCTION:    729.63719536451015
 OBJECTIVE FUNCTION VALUE WITHOUT CONSTANT:    7648.4193146375492
 OBJECTIVE FUNCTION VALUE WITH CONSTANT:       8378.0565100020594
 REPORTED OBJECTIVE FUNCTION DOES NOT CONTAIN CONSTANT

 TOTAL EFFECTIVE ETAS (NIND*NETA):                            80


 #TERE:
 Elapsed estimation  time in seconds:     7.62
 Elapsed covariance  time in seconds:     3.12
 Elapsed postprocess time in seconds:     1.00

 ********************               FIRST ORDER CONDITIONAL ESTIMATION WITH INTERACTION              ********************
 #OBJT:**************                       MINIMUM VALUE OF OBJECTIVE FUNCTION                      ********************
 #OBJV:********************************************     7648.419       **************************************************

 ********************               FIRST ORDER CONDITIONAL ESTIMATION WITH INTERACTION              ********************
 ********************                             FINAL PARAMETER ESTIMATE                           ********************

 THETA - VECTOR OF FIXED EFFECTS PARAMETERS   *********
         TH 1      TH 2      TH 3      TH 4      TH 5      TH 6      TH 7
         1.22E-02  4.30E+00  2.07E-02  1.97E+00  1.41E-01  0.00E+00  7.33E-01

 OMEGA - COV MATRIX FOR RANDOM EFFECTS - ETAS  ********
         ETA1      ETA2      ETA3      ETA4
 ETA1
+        2.14E-01
 ETA2
+        0.00E+00  3.11E-02
 ETA3
+        0.00E+00  0.00E+00  0.00E+00
 ETA4
+        0.00E+00  0.00E+00  0.00E+00  0.00E+00

 SIGMA - COV MATRIX FOR RANDOM EFFECTS - EPSILONS  ****
         EPS1
 EPS1
+        1.00E+00

 OMEGA - CORR MATRIX FOR RANDOM EFFECTS - ETAS  *******
         ETA1      ETA2      ETA3      ETA4
 ETA1
+        4.63E-01
 ETA2
+        0.00E+00  1.76E-01
 ETA3
+        0.00E+00  0.00E+00  0.00E+00
 ETA4
+        0.00E+00  0.00E+00  0.00E+00  0.00E+00

 SIGMA - CORR MATRIX FOR RANDOM EFFECTS - EPSILONS  ***
         EPS1
 EPS1
+        1.00E+00

 ********************               FIRST ORDER CONDITIONAL ESTIMATION WITH INTERACTION              ********************
 ********************                            STANDARD ERROR OF ESTIMATE                          ********************

 THETA - VECTOR OF FIXED EFFECTS PARAMETERS   *********
         TH 1      TH 2      TH 3      TH 4      TH 5      TH 6      TH 7
         7.73E-04  1.25E-01  2.52E-03  2.85E-01  1.27E-02 .........  1.39E-01

 OMEGA - COV MATRIX FOR RANDOM EFFECTS - ETAS  ********
         ETA1      ETA2      ETA3      ETA4
 ETA1
+        8.49E-02
 ETA2
+       .........  8.02E-03
 ETA3
+       ......... ......... .........
 ETA4
+       ......... ......... ......... .........

 SIGMA - COV MATRIX FOR RANDOM EFFECTS - EPSILONS  ****
         EPS1
 EPS1
+       .........

 OMEGA - CORR MATRIX FOR RANDOM EFFECTS - ETAS  *******
         ETA1      ETA2      ETA3      ETA4
 ETA1
+        9.17E-02
 ETA2
+       .........  2.27E-02
 ETA3
+       ......... ......... .........
 ETA4
+       ......... ......... ......... .........

 SIGMA - CORR MATRIX FOR RANDOM EFFECTS - EPSILONS  ***
         EPS1
 EPS1
+       .........
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 Elapsed finaloutput time in seconds:     0.38
 #CPUT: Total CPU Time in Seconds,       46.953
